// COMSOL Multiphysics 5.5.0.306 model "beam.mph"
// Outline of the model tree

Parameters
  L = 1.5  // Length
  A = 0.01  // X-Section Area
  I = 8.33333333333e-06  // 2nd Moment Area
  P = -10000  // Load
  xP = 1  // x of Load
  Young = 210000000000  // Young's mod
  Poisson = 0.285  // Poisson's ratio
  Rho = 7800  // density

Geometry
  geom1 "Geometry 1" (2D, length unit m)
    ls1: LineSegment | specify1 = coord; specify2 = coord; coord2 = {L, 0}
    fin: Finalize "Form Union"

Physics
  beam: HermitianBeam on all boundaries
    dependent variable u = {u, v, w}
    emm1: Elastic "Linear Elastic Material 1" (default)
      E_mat = userdef
      E = Young
      nu_mat = userdef
      nu = Poisson
      rho_mat = userdef
      rho = Rho
    csd1: CrossSectionBeam "Cross Section Data 1" (default) | area = A; Izz = I
    free1: Free (default)
    init1: init "Initial Values 1" (default)
    pdr1: DispRot0 "Prescribed Displacement/Rotation 1" on points 1 | Direction = {1, 1, 0}
    pdr2: DispRot0 "Prescribed Displacement/Rotation 2" on points 2 | Direction = {0, 1, 0}
    el1: EdgeLoad on boundaries 1 | FeperLength = {0, P, 0}

Mesh
  mesh1 "Mesh 1"
    size: MeshSizeDefault | hmax = 0.125; custom = on
    auto_f1: Edge on remaining entities

Studies
  std1 "Study 1"
    stat: Stationary
  std2 "Study 2"
    eig: Eigenfrequency | neigs = 4; shift = 1[Hz]

Solver configurations
  sol1 "Solution 1" (study std1)
    v1: Variables "Dependent Variables 1"
    s1: Stationary "Stationary Solver 1"
      dDef: Direct
      fc1: FullyCoupled
  sol2 "Solution 2" (study std2)
    v1: Variables "Dependent Variables 1"
    e1: Eigenvalue "Eigenvalue Solver 1"
      dDef: Direct

Datasets
  dset1: Solution | solution = sol1
  dset2: Solution | solution = sol2